Thu Sep 27 18:40:52 BST 2012
gfortran
$PROB  Dacogen-PK-model: 3-CMT-model-lin-dist second CL on V2

$INPUT C ID TSLD=TIME AMT RATE DURN CONC DV MDV EVID STUD
       SUBJ=DROP DAY CYCL TP=DROP SEX RACE=DROP AGE=DROP WT BSA BMI
       CRCL=DROP CRCN CREA=DROP BILI=DROP DOSE DIS=DROP OCC=DROP
       NTIM=DROP CODE=DROP TAFD

$DATA  DacogenData.csv IGNORE=C

$SUB   ADVAN6 TRANS1 TOL=4

$MODEL
       COMP=(CENTRAL,DEFDOSE,DEFOBS)
       COMP=(PERIF)
       COMP=(PERIF2)

$PK
;***PK PARAMETERS***

 TVCL  = THETA(1)
 CL    = TVCL * EXP(ETA(1))

 TV1   = THETA(2)
 V1    = TV1 * EXP(ETA(2))

 TKM   = THETA(3)
 KM    = TKM * EXP(ETA(3))

 TK21  = THETA(4)
 K21   = TK21

 TK13  = THETA(5)
 K13   = TK13

 TK31  = THETA(6)
 K31   = TK31

 TK20  = THETA(7)
 K20   = TK20

 DUR1=DURN
 IF(DURN.LT.0.AND.STUD.NE.18)DUR1=1
 IF(DURN.LT.0.AND.STUD.EQ.18)DUR1=3
 D1 = DUR1
 IF(DURN.LT.0) D1  = DUR1  * EXP(ETA(4))

 S1  = V1/1000
 K10 = CL/V1

$DES
DADT(1) = -K10*A(1) - (KM*A(1)) + K21*A(2) - K13*A(1) + K31*A(3)
DADT(2) =             (KM*A(1)) - K21*A(2) - K20*A(2)
DADT(3) =                                    K13*A(1) - K31*A(3)

$ERROR CALLFL=0
 IPRE = -5
 W1=A(1)
 W2=A(2)
 IF (F.GT.0) IPRE=LOG(F)   ;if you work in log domain
 IRES = DV - IPRE          ;calculate individual residuals
 Y    = IPRE + EPS(1)      ;if you work in log domain

$THETA
(0.01 125  1000)                    ;1 CL
(0.01 18    500)                    ;2 V1
(1 7.3       20)                    ;3 KM
0.0182 FIX; (0.01 0.19  500)        ;4 K21
(0.01 3.1  1000)                    ;5 K13
(0.01 3.1  1000)                    ;6 K31
10 FIX                              ;7 K20

$OMEGA
0.01    ;IIV.CL
0.01    ;IIV.V1
0.01    ;IIV.KM
;0.01    ;IIV.K21
;0.01    ;IIV.K13
0.01    ;IIV.RATE

$SIGMA
0.1

$EST MAX=9990 POSTHOC NSIGDIG=3 PRINT=5 NOABORT  MSF=msf0 METHOD=1
$COV PRINT=E MATRIX=S

$TABLE STUD ID TIME TSLD DAY DOSE AMT IPRE W1 ONEHEADER
       NOPRINT FILE=sdtab240a.tab
$TABLE STUD ID TIME TSLD DAY DOSE AMT DV CL V1 KM K21 K10 K20 WT BSA W1 W2
       SEX CRCN ETA1 ETA2 ETA3 ETA4 ONEHEADER
       NOPRINT FILE=patab240ap.tab

 WARNINGS AND ERRORS (IF ANY) FOR PROBLEM    1
 (WARNING  2) NM-TRAN INFERS THAT THE DATA ARE POPULATION.

1NONLINEAR MIXED EFFECTS MODEL PROGRAM (NONMEM) VERSION 7.1.0
 ORIGINALLY DEVELOPED BY STUART BEAL, LEWIS SHEINER, AND ALISON BOECKMANN
 CURRENT DEVELOPERS ARE ROBERT BAUER, ICON DEVELOPMENT SOLUTIONS,
 AND ALISON BOECKMANN. IMPLEMENTATION, EFFICIENCY, AND STANDARDIZATION
 PERFORMED BY NOUS INFOSYSTEMS.
 PROBLEM NO.:         1
 Dacogen-PK-model: 3-CMT-model-lin-dist second CL on V2
 TOT. NO. OF OBS RECS:      517
 TOT. NO. OF INDIVIDUALS:     35
 GENERAL NONLINEAR KINETICS MODEL (ADVAN6)
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 #METH: First Order Conditional Estimation
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 Elapsed estimation time in seconds:   245.60

 #TERM:
0MINIMIZATION SUCCESSFUL
 NO. OF FUNCTION EVALUATIONS USED:      481
 NO. OF SIG. DIGITS IN FINAL EST.:  3.3
0PARAMETER ESTIMATE IS NEAR ITS BOUNDARY
 THIS MUST BE ADDRESSED BEFORE THE COVARIANCE STEP CAN BE IMPLEMENTED

 ETABAR IS THE ARITHMETIC MEAN OF THE ETA-ESTIMATES,
 AND THE P-VALUE IS GIVEN FOR THE NULL HYPOTHESIS THAT THE TRUE MEAN IS 0.

 ETABAR:         1.8060E-03 -8.7502E-03 -3.1061E-07  3.3208E-03
 SE:             5.2854E-02  1.4258E-01  6.6119E-07  2.5272E-03

 P VAL.:         9.7274E-01  9.5106E-01  6.3852E-01  1.8884E-01

 ETAshrink(%):   2.8622E+01  2.2414E+00  9.9603E+01  7.1723E+01
 EPSshrink(%):   5.2301E+00

 #TERE:

 ********************                        FIRST ORDER CONDITIONAL ESTIMATION                      ********************
 #OBJT:**************                       MINIMUM VALUE OF OBJECTIVE FUNCTION                      ********************
 #OBJV:********************************************     -266.944       **************************************************

 ********************                        FIRST ORDER CONDITIONAL ESTIMATION                      ********************
 ********************                             FINAL PARAMETER ESTIMATE                           ********************

 THETA - VECTOR OF FIXED EFFECTS PARAMETERS   *********
         TH 1      TH 2      TH 3      TH 4      TH 5      TH 6      TH 7
         7.01E+01  3.19E+01  5.75E+00  1.82E-02  1.47E+00  1.20E+00  1.00E+01

 OMEGA - COV MATRIX FOR RANDOM EFFECTS - ETAS  ********
            ETA1      ETA2      ETA3      ETA4
 ETA1
+        1.98E-01
 ETA2
+        0.00E+00  7.66E-01
 ETA3
+        0.00E+00  0.00E+00  1.00E-06
 ETA4
+        0.00E+00  0.00E+00  0.00E+00  2.88E-03

 SIGMA - COV MATRIX FOR RANDOM EFFECTS - EPSILONS  ****
            EPS1
 EPS1
+        1.64E-01
