Fri Sep 28 11:06:53 BST 2012
gfortran
;Model Desc: MK-0634 PopPK Base Model, 2-compartment, with exponential IIV on CL and V2
;Project Name: MK-0634 Population PK Analysis
;Project ID: NO PROJECT DESCRIPTION
$PROBLEM    RUN# base_run1
$INPUT      ID PERD PROT TIME AMT DV EVID MDV ADDL II FED AGE SEXF WT
            HT RACE BMI BSA CRCL DOSE
$DATA       simu_rich_2.csv IGNORE=@
$SUBROUTINE ADVAN4 TRANS4
$OMEGA  DIAGONAL(5)
 0.06  ; [P] INTERIND VAR IN CL
 0.06  ; [P] INTERIND VAR IN V2
 0.06  ; [P] INTERIND VAR IN KA
 0  FIX  ; [P] INTERIND VAR IN Q
 0  FIX  ; [P] INTERIND VAR IN V3
$PK

; Insert stratification variable (STRT) variable for VPC
; Typically stratify on dose, dosing regimen, protocol, ....
; For no stratification, set STRT=Constant
  STRT=PROT*1000+DOSE

  TVCL=EXP(THETA(1))
  MU_1=LOG(TVCL)
  CL=EXP(MU_1+ETA(1))

  TVV2=EXP(THETA(2))
  MU_2=LOG(TVV2)
  V2=EXP(MU_2+ETA(2))

  TVKA=THETA(3)
  MU_3=LOG(TVKA)
  KA=EXP(MU_3+ETA(3))

  TVF1=THETA(4)
  F1=TVF1

  TVQ=EXP(THETA(5))
  MU_4=LOG(TVQ)
  Q=EXP(MU_4+ETA(4))

  TVV3=EXP(THETA(6))
  MU_5=LOG(TVV3)
  V3=EXP(MU_5+ETA(5))

  S2=V2*624.709/1E6
AUC=1
CMAX=0.5
xyz=1
$ERROR

  IPRED=F
  IRES=DV-IPRED

  DEL=0
  IF (F.EQ.0) DEL=10
  W=F
  IWRES=IRES/(W+DEL)
  Y=F*(1+ERR(1))

$THETA  6.5 ; 1 [CL]
 9 ; 2 [V2]
 (0,0.5) ; 3 [KA]
 1 FIX ; 4 [F1]
 6.5 ; 5[Q]
 10 ; 6 [V3]
$SIGMA  0.04  ; [P] Variance for proportional error
$SIMULATION (12345) NSUB=5
$ESTIMATION METHOD=1 INTERACTION PRINT=1 NOABORT MAXEVAL=9999
;$COV PRINT=E

;Tables for Xpose Diagnostic Plots

;Standard Table file containing ID, IDV, DV, PRED, IPRED,

; STRT, WRES, IWRES, RES, IRES, etc.

;$TABLE      ID TIME IPRED EVID MDV CWRES IWRES STRT NOPRINT ONEHEADER

;            FILE=sdtab1

;Parameter table containing model parameters - THETAS, ETAS, EPS

;$TABLE      ID CL V2 KA F1 Q V3 CMAX AUC ETA1 ETA2 ETA3 ETA4 NOPRINT ONEHEADER

;            FILE=patab1

;Continuous Covariate table - WT, AGE,...

;$TABLE ID WT HT AGE BMI BSA CRCL NOPRINT ONEHEADER FILE=cotab1

;Categorical covariate table - SEX, RACE,.....
$TABLE      ID PROT SEXF RACE FED NOPRINT ONEHEADER FILE=catab14

 WARNINGS AND ERRORS (IF ANY) FOR PROBLEM    1
 (WARNING  2) NM-TRAN INFERS THAT THE DATA ARE POPULATION.

1NONLINEAR MIXED EFFECTS MODEL PROGRAM (NONMEM) VERSION 7.1.0
 ORIGINALLY DEVELOPED BY STUART BEAL, LEWIS SHEINER, AND ALISON BOECKMANN
 CURRENT DEVELOPERS ARE ROBERT BAUER, ICON DEVELOPMENT SOLUTIONS,
 AND ALISON BOECKMANN. IMPLEMENTATION, EFFICIENCY, AND STANDARDIZATION
 PERFORMED BY NOUS INFOSYSTEMS.
 PROBLEM NO.:         1
 RUN# base_run1
 TOT. NO. OF OBS RECS:      767
 TOT. NO. OF INDIVIDUALS:     22
 TWO COMPARTMENT MODEL WITH FIRST-ORDER ABSORPTION (ADVAN4)
 PROBLEM NO.:         1     SUBPROBLEM NO.:      1
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 SIMULATION STEP PERFORMED
 #METH: First Order Conditional Estimation with Interaction
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 Elapsed estimation time in seconds:    17.46

 #TERM:
0MINIMIZATION SUCCESSFUL
 HOWEVER, PROBLEMS OCCURRED WITH THE MINIMIZATION.
 REGARD THE RESULTS OF THE ESTIMATION STEP CAREFULLY, AND ACCEPT THEM ONLY
 AFTER CHECKING THAT THE COVARIANCE STEP PRODUCES REASONABLE OUTPUT.
 NO. OF FUNCTION EVALUATIONS USED:      418
 NO. OF SIG. DIGITS IN FINAL EST.:  3.2

 ETABAR IS THE ARITHMETIC MEAN OF THE ETA-ESTIMATES,
 AND THE P-VALUE IS GIVEN FOR THE NULL HYPOTHESIS THAT THE TRUE MEAN IS 0.

 ETABAR:         7.9270E-04  1.6923E-03  1.0899E-03  0.0000E+00  0.0000E+00
 SE:             5.5695E-02  5.7395E-02  1.8203E-02  0.0000E+00  0.0000E+00

 P VAL.:         9.8864E-01  9.7648E-01  9.5226E-01  1.0000E+00  1.0000E+00

 ETAshrink(%):  -1.2661E+00  6.7410E+00  4.5327E+01  1.0000E+02  1.0000E+02
 EPSshrink(%):   2.7542E+00

 #TERE:

 ********************               FIRST ORDER CONDITIONAL ESTIMATION WITH INTERACTION              ********************
 #OBJT:**************                       MINIMUM VALUE OF OBJECTIVE FUNCTION                      ********************
 #OBJV:********************************************     2445.367       **************************************************

 ********************               FIRST ORDER CONDITIONAL ESTIMATION WITH INTERACTION              ********************
 ********************                             FINAL PARAMETER ESTIMATE                           ********************

 THETA - VECTOR OF FIXED EFFECTS PARAMETERS   *********
         TH 1      TH 2      TH 3      TH 4      TH 5      TH 6
         6.46E+00  9.00E+00  4.85E-01  1.00E+00  6.49E+00  1.00E+01

 OMEGA - COV MATRIX FOR RANDOM EFFECTS - ETAS  ********
            ETA1      ETA2      ETA3      ETA4      ETA5
 ETA1
+        6.97E-02
 ETA2
+        0.00E+00  8.73E-02
 ETA3
+        0.00E+00  0.00E+00  2.55E-02
 ETA4
+        0.00E+00  0.00E+00  0.00E+00  0.00E+00
 ETA5
+        0.00E+00  0.00E+00  0.00E+00  0.00E+00  0.00E+00

 SIGMA - COV MATRIX FOR RANDOM EFFECTS - EPSILONS  ****
            EPS1
 EPS1
+        4.27E-02
 PROBLEM NO.:         1     SUBPROBLEM NO.:      2
 SIMULATION STEP PERFORMED
 #METH: First Order Conditional Estimation with Interaction
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 Elapsed estimation time in seconds:    26.96

 #TERM:
0MINIMIZATION SUCCESSFUL
 HOWEVER, PROBLEMS OCCURRED WITH THE MINIMIZATION.
 REGARD THE RESULTS OF THE ESTIMATION STEP CAREFULLY, AND ACCEPT THEM ONLY
 AFTER CHECKING THAT THE COVARIANCE STEP PRODUCES REASONABLE OUTPUT.
 NO. OF FUNCTION EVALUATIONS USED:      489
 NO. OF SIG. DIGITS IN FINAL EST.:  3.0

 ETABAR IS THE ARITHMETIC MEAN OF THE ETA-ESTIMATES,
 AND THE P-VALUE IS GIVEN FOR THE NULL HYPOTHESIS THAT THE TRUE MEAN IS 0.

 ETABAR:         5.1662E-04  1.7368E-04 -1.4866E-03  0.0000E+00  0.0000E+00
 SE:             5.1651E-02  4.0328E-02  3.4994E-02  0.0000E+00  0.0000E+00

 P VAL.:         9.9202E-01  9.9656E-01  9.6611E-01  1.0000E+00  1.0000E+00

 ETAshrink(%):  -1.3651E+00  1.2511E+01  2.8323E+01  1.0000E+02  1.0000E+02
 EPSshrink(%):   2.9443E+00

 #TERE:

 ********************               FIRST ORDER CONDITIONAL ESTIMATION WITH INTERACTION              ********************
 #OBJT:**************                       MINIMUM VALUE OF OBJECTIVE FUNCTION                      ********************
 #OBJV:********************************************     2223.383       **************************************************

 ********************               FIRST ORDER CONDITIONAL ESTIMATION WITH INTERACTION              ********************
 ********************                             FINAL PARAMETER ESTIMATE                           ********************

 THETA - VECTOR OF FIXED EFFECTS PARAMETERS   *********
         TH 1      TH 2      TH 3      TH 4      TH 5      TH 6
         6.57E+00  9.03E+00  5.50E-01  1.00E+00  6.47E+00  9.96E+00

 OMEGA - COV MATRIX FOR RANDOM EFFECTS - ETAS  ********
            ETA1      ETA2      ETA3      ETA4      ETA5
 ETA1
+        5.98E-02
 ETA2
+        0.00E+00  4.90E-02
 ETA3
+        0.00E+00  0.00E+00  5.49E-02
 ETA4
+        0.00E+00  0.00E+00  0.00E+00  0.00E+00
 ETA5
+        0.00E+00  0.00E+00  0.00E+00  0.00E+00  0.00E+00

 SIGMA - COV MATRIX FOR RANDOM EFFECTS - EPSILONS  ****
            EPS1
 EPS1
+        3.70E-02
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