Fri Aug 10 14:36:09 BST 2012
gfortran
;Model Desc: MK-0634 PopPK Base Model, 2-compartment, with exponential IIV on CL and V2
;Project Name: MK-0634 Population PK Analysis
;Project ID: NO PROJECT DESCRIPTION
$PROBLEM    RUN# base_run1
$INPUT      ID PERD PROT TIME AMT DV EVID MDV ADDL II FED AGE=DROP
            SEXF=DROP WT=DROP HT=DROP RACE=DROP BMI BSA=DROP CRCL=DROP
            DOSE
$DATA       simu_rich_2.csv IGNORE=@
$SUBROUTINE ADVAN4 TRANS4
$OMEGA  DIAGONAL(5)
 0.0403288  ; [P] INTERIND VAR IN CL
 6E-06  ; [P] INTERIND VAR IN V2
 0.0646326  ; [P] INTERIND VAR IN KA
 0  FIX  ; [P] INTERIND VAR IN Q
 0  FIX  ; [P] INTERIND VAR IN V3
$PK

;;; V2BMI-DEFINITION START
V2BMI = ( 1 + THETA(7)*(BMI - 26.73))
;;; V2BMI-DEFINITION END

;;; V2-RELATION START
V2COV=V2BMI
;;; V2-RELATION END

; Insert stratification variable (STRT) variable for VPC
; Typically stratify on dose, dosing regimen, protocol, ....
; For no stratification, set STRT=Constant
  STRT=PROT*1000+DOSE

  TVCL=EXP(THETA(1))
  MU_1=LOG(TVCL)
  CL=EXP(MU_1+ETA(1))

  TVV2=EXP(THETA(2))

TVV2 = V2COV*TVV2
  MU_2=LOG(TVV2)
  V2=EXP(MU_2+ETA(2))

  TVKA=THETA(3)
  MU_3=LOG(TVKA)
  KA=EXP(MU_3+ETA(3))

  TVF1=THETA(4)
  F1=TVF1

  TVQ=EXP(THETA(5))
  MU_4=LOG(TVQ)
  Q=EXP(MU_4+ETA(4))

  TVV3=EXP(THETA(6))
  MU_5=LOG(TVV3)
  V3=EXP(MU_5+ETA(5))

  S2=V2*624.709/1E6

$ERROR

  IPRED=F
  IRES=DV-IPRED

  DEL=0
  IF (F.EQ.0) DEL=10
  W=F
  IWRES=IRES/(W+DEL)
  Y=F*(1+ERR(1))

$THETA  6.0281 ; 1 [CL]
 7.32805 ; 2 [V2]
 (0,0.210945) ; 3 [KA]
 1 FIX ; 4 [F1]
 5.8541 ; 5[Q]
 9.34418 ; 6 [V3]
$THETA  (-0.166,-0.000166,0.185) ; V2BMI1
$SIGMA  0.121418  ; [P] Variance for proportional error
$ESTIMATION METHOD=1 INTERACTION PRINT=1 NOABORT MAXEVAL=9999
;$COV PRINT=E

;Tables for Xpose Diagnostic Plots

;Standard Table file containing ID, IDV, DV, PRED, IPRED,

; STRT, WRES, IWRES, RES, IRES, etc.
$TABLE      ID TIME IPRED EVID MDV CWRES IWRES STRT NOPRINT ONEHEADER
            FILE=V2BMI2.mod.sdtab1
;Parameter table containing model parameters - THETAS, ETAS, EPS
$TABLE      ID CL V2 KA F1 Q V3 ETA1 ETA2 ETA3 ETA4 NOPRINT ONEHEADER
            FILE=V2BMI2.mod.patab1
;Continuous Covariate table - WT, AGE,...

;$TABLE ID WT HT AGE BMI BSA CRCL NOPRINT ONEHEADER FILE=cotab1

;Categorical covariate table - SEX, RACE,.....

;$TABLE ID PROT SEXF RACE FED NOPRINT ONEHEADER FILE=catab1

 WARNINGS AND ERRORS (IF ANY) FOR PROBLEM    1
 (WARNING  2) NM-TRAN INFERS THAT THE DATA ARE POPULATION.

1NONLINEAR MIXED EFFECTS MODEL PROGRAM (NONMEM) VERSION 7.1.0
 ORIGINALLY DEVELOPED BY STUART BEAL, LEWIS SHEINER, AND ALISON BOECKMANN
 CURRENT DEVELOPERS ARE ROBERT BAUER, ICON DEVELOPMENT SOLUTIONS,
 AND ALISON BOECKMANN. IMPLEMENTATION, EFFICIENCY, AND STANDARDIZATION
 PERFORMED BY NOUS INFOSYSTEMS.
 PROBLEM NO.:         1
 RUN# base_run1
 TOT. NO. OF OBS RECS:      767
 TOT. NO. OF INDIVIDUALS:     22
 TWO COMPARTMENT MODEL WITH FIRST-ORDER ABSORPTION (ADVAN4)
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 #METH: First Order Conditional Estimation with Interaction
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 Elapsed estimation time in seconds:   204.12

 #TERM:
0MINIMIZATION TERMINATED
 DUE TO ROUNDING ERRORS (ERROR=134)
 NO. OF FUNCTION EVALUATIONS USED:      644
 NO. OF SIG. DIGITS UNREPORTABLE

 ETABAR IS THE ARITHMETIC MEAN OF THE ETA-ESTIMATES,
 AND THE P-VALUE IS GIVEN FOR THE NULL HYPOTHESIS THAT THE TRUE MEAN IS 0.

 ETABAR:         1.0891E-03 -4.3502E-07 -8.1344E-04  0.0000E+00  0.0000E+00
 SE:             4.1648E-02  3.0507E-06  4.2754E-02  0.0000E+00  0.0000E+00

 P VAL.:         9.7914E-01  8.8661E-01  9.8482E-01  1.0000E+00  1.0000E+00

 ETAshrink(%):   9.3530E-01  9.9381E+01  1.2360E+01  1.0000E+02  1.0000E+02
 EPSshrink(%):   1.8597E+00

 #TERE:

 ********************               FIRST ORDER CONDITIONAL ESTIMATION WITH INTERACTION              ********************
 #OBJT:**************                       MINIMUM VALUE OF OBJECTIVE FUNCTION                      ********************
 #OBJV:********************************************     3758.574       **************************************************

 ********************               FIRST ORDER CONDITIONAL ESTIMATION WITH INTERACTION              ********************
 ********************                             FINAL PARAMETER ESTIMATE                           ********************

 THETA - VECTOR OF FIXED EFFECTS PARAMETERS   *********
         TH 1      TH 2      TH 3      TH 4      TH 5      TH 6      TH 7
         6.03E+00  7.36E+00  2.14E-01  1.00E+00  5.86E+00  9.34E+00 -4.63E-02

 OMEGA - COV MATRIX FOR RANDOM EFFECTS - ETAS  ********
            ETA1      ETA2      ETA3      ETA4      ETA5
 ETA1
+        4.07E-02
 ETA2
+        0.00E+00  5.60E-06
 ETA3
+        0.00E+00  0.00E+00  5.48E-02
 ETA4
+        0.00E+00  0.00E+00  0.00E+00  0.00E+00
 ETA5
+        0.00E+00  0.00E+00  0.00E+00  0.00E+00  0.00E+00

 SIGMA - COV MATRIX FOR RANDOM EFFECTS - EPSILONS  ****
            EPS1
 EPS1
+        1.21E-01
